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/batch
! ANSYS input file written by Workbench version 2022 R1
! File used for geometry attach: C:\Users\anon99877\AppData\Local\Temp\test_sheet_panel_deformed.tmp\test_sheet_panel_deformed_files\dp51\SYS\DM\SYS.scdoc
/title,test_sheet_panel_deformed--Static Structural (A5)
/com,--- Data in consistent MKS units. See Solving Units in the help system for more information.
/units,MKS
/prep7
! Turn off shape checking because checks already performed inside WB mesher.
! See help system for more information.
SHPP,OFF,,NOWARN
etcon,set             ! allow ANSYS to choose best KEYOP's for 180x elements, resets any applicable keyopt to MAPDL defaults
/com,*********** Nodes for the whole assembly ***********
nblock,3,,10040
(1i9,3e20.9e3)
        1     4.000000000E-02     0.000000000E+00     9.600000000E-01
        2     4.000000000E-02     0.000000000E+00     9.200000000E-01
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-1
/com,*********** Elements for Body 1 "SYS\Solid" ***********
et,1,186
keyo,1,2,1          ! set full integration on SOLID186
eblock,19,solid,,1250
(19i9)
        1        1        1        1        0        0        0        0       20        0        1     1176     2652     2628     2579     1177     2376     2377     2378
     6253     9105     9057     6252     6256     8726     8728     6257     6251     8727     8729     8731
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-1
/com,*********** Send User Defined Coordinate System(s) ***********
csys,0
toffst,273.15,  ! Temperature offset from absolute zero
/com,*********** Set Reference Temperature ***********
tref,22.
/com,*********** Send Materials ***********
Temperature = 'TEMP' ! Temperature
MP,DENS,1,7850,	! kg m^-3
MP,ALPX,1,1.2e-05,	! C^-1
MP,C,1,434,	! J kg^-1 C^-1
MP,KXX,1,60.5,	! W m^-1 C^-1
MP,RSVX,1,1.7e-07,	! kg m^3 A^-2 s^-3
MP,EX,1,200000000000,	! Pa
MP,NUXY,1,0.3,
MP,MURX,1,10000,

!************************* Model Summary ********************
!SYS\Solid,	Structural Steel,	matid,	1
!************************* End Model Summary ********************
/com,*********** Fixed Supports ***********
CMBLOCK,_FIXEDSU,NODE,       12
(8i10)
       587       588       589       590       611       612       613       614
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cmsel,s,_FIXEDSU
d,all,all
nsel,all
fini
/com,****************************************************************************
/com,*************************    SOLUTION       ********************************
/com,****************************************************************************
/solu
antype,0                   ! static analysis
_thickRatio=  0     ! Ratio of thick parts in the model
eqsl,sparse,,,,,1
cntr,print,1               ! print out contact info and also make no initial contact an error
dmpoption,emat,no             ! Don't combine emat file for DANSYS
dmpoption,esav,no             ! Don't combine esav file for DANSYS
nldiag,cont,iter           ! print out contact info each equilibrium iteration
rescontrol,,none                 ! Do not keep any restart files
/com,****************************************************
/com,******************* SOLVE FOR LS 1 OF 1 ****************
/com,*** Set Displacements ***
CMBLOCK,_CM98UY_YP,NODE,        3
(8i10)
      2377      2628      8729
cmsel,s,_CM98UY_YP
d,all,uy,-4.2632564145606e-019
CMBLOCK,_CM100UY_YP,NODE,        3
(8i10)
      2452      2553      8879
cmsel,s,_CM100UY_YP
d,all,uy,1.28e-003
CMBLOCK,_CM102UY_YP,NODE,        3
(8i10)
      2427      2578      8829
cmsel,s,_CM102UY_YP
d,all,uy,3.2e-004
CMBLOCK,_CM108UY_YP,NODE,        3
(8i10)
      2502      2552      8978
cmsel,s,_CM108UY_YP
d,all,uy,-1.92e-003
nsel,all

/com,*** Component For All Non-Zero UY Displacements ***
cmsel,s,_CM98uy_yp
cmsel,a,_CM100uy_yp
cmsel,a,_CM102uy_yp
cmsel,a,_CM108uy_yp
cm,_DISPNONZEROUY,NODE
nsel,all

nsub,1,1,1
time,1.
outres,erase
outres,all,none
outres,nsol,all,
outres,rsol,all
outres,eangl,all
outres,etmp,all
outres,veng,all
outres,strs,all,
outres,epel,all,
outres,eppl,all,
outres,cont,all,
! *********** WB SOLVE COMMAND ***********
! check interactive state
*get,ANSINTER_,active,,int
*if,ANSINTER_,ne,0,then
/eof
*endif
solve
/com *************** Write FE CONNECTORS *********
CEWRITE,file,ce,,INTE
/com,****************************************************
/com,*************** FINISHED SOLVE FOR LS 1 *************
/post1
fini
